Sat Dec 16 15:01:19 EST 2023
$PROBLEM    018 with 2 comp
$INPUT ROW ID TIME EVID CMT AMT DV MDV BBW

$DATA  ../NMsimData_xgxr021_known_01.csv
IGN=@

$SUBROUTINE ADVAN4 TRANS4
$PK
TVKA=THETA(1)
TVV2=THETA(2)
TVCL=THETA(3)
TVV3=THETA(4)
TVQ=THETA(5)

KA=TVKA*EXP(ETA(1))
V2=TVV2*EXP(ETA(2))
CL=TVCL*EXP(ETA(3))
V3=TVV3*EXP(ETA(4))
Q=TVQ*EXP(ETA(5))
S2=V2

$ERROR
  IPRED=F
  IRES=DV-IPRED

  IF (IPRED.GT.1) THEN
    W = SQRT(IPRED**2*SIGMA(1,1) + SIGMA(2,2))
  ELSE
    W=1
  ENDIF

  IWRES=IRES/W
  Y=F+F*ERR(1)+ERR(2)

;-----------------------INITIAL ESTIMATES---------------------------------
$THETA  (0,2.16656) ; POPKA
$THETA  (0,75.729) ; POPV2
$THETA  (0,13.9777) ; POPCL
$THETA  (0,150.059) ; POPV3
$THETA  (0,8.4865) ; TVQ
$OMEGA  0  FIX
$OMEGA  0.178666
$OMEGA  0.249778
$OMEGA  0  FIX
$OMEGA  0  FIX
$SIGMA  0.0822435
$SIGMA  0  FIX

$SIMULATION  (1041610490)

$ETAS FILE=NMsim_xgxr021_known_01_input.phi FORMAT=s1pE15.8 TBLN=1
$ESTIMATION  MAXEVAL=0 NOABORT METHOD=1 INTERACTION FNLETA=2

$TABLE PRED IPRED FILE=NMsim_xgxr021_known_01.tab

NM-TRAN MESSAGES
 WARNINGS AND ERRORS (IF ANY) FOR PROBLEM    1
 (WARNING  2) NM-TRAN INFERS THAT THE DATA ARE POPULATION.
 (WARNING  79) SIGMA IS USED ON THE RIGHT. WITH A SUBSEQUENT RUN, IF AN
 INITIAL ESTIMATE OF A DIAGONAL BLOCK OF SIGMA IS TO BE COMPUTED BY
 NONMEM, THAT BLOCK WILL BE SET TO AN IDENTITY MATRIX DURING THAT
 COMPUTATION. THIS COULD LEAD TO AN ARITHMETIC EXCEPTION.*
 * THE MAXIMUM NUMBER OF WARNINGS OF ONE OR MORE TYPES WAS REACHED.
 IT IS POSSIBLE THAT SOME WARNING MESSAGES WERE SUPPRESSED.

1NONLINEAR MIXED EFFECTS MODEL PROGRAM (NONMEM) VERSION 7.5.0
 ORIGINALLY DEVELOPED BY STUART BEAL, LEWIS SHEINER, AND ALISON BOECKMANN
 CURRENT DEVELOPERS ARE ROBERT BAUER, ICON DEVELOPMENT SOLUTIONS,
 AND ALISON BOECKMANN. IMPLEMENTATION, EFFICIENCY, AND STANDARDIZATION
 PERFORMED BY NOUS INFOSYSTEMS.
 PROBLEM NO.:         1
 018 with 2 comp
 TOT. NO. OF OBS RECS:        0
 TOT. NO. OF INDIVIDUALS:        5
 TWO COMPARTMENT MODEL WITH FIRST-ORDER ABSORPTION (ADVAN4)
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 SIMULATION STEP PERFORMED
 Elapsed simulation  time in seconds:     0.00
 Elapsed postprocess time in seconds:     0.02
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 Elapsed finaloutput time in seconds:     0.00
 #CPUT: Total CPU Time in Seconds,        0.023
